*HEADING
Plane Stress Linear Static analysis of Beam under Parabolic Loading
*PREPRINT, ECHO=YES, HISTORY=NO, MODEL=NO
**
** PARTS
**
*Part, name=Part-1
*End Part
**
**
** ASSEMBLY
**
*Assembly, name=Assembly
**
*Instance, name=Part-1-1, part=Part-1
*NODE
  1,0.0,-6.0
  2,1.0,-6.0
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*ELEMENT, TYPE=CPS4R, ELSET=EALL
  1,1,2,51,50
  2,2,3,52,51
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** Section: Section-1
*Solid Section, elset=EALL, material=Material-1
1,
*End Instance
**
*Nset, nset=Set_boundary,generate, instance=Part-1-1
  1, 589, 49
*Nset, nset=Set_1, instance=Part-1-1
  49, 637
*Nset, nset=Set_2, instance=Part-1-1
  98, 588
*Nset, nset=Set_3, instance=Part-1-1
  147, 539
*Nset, nset=Set_4, instance=Part-1-1
  196, 490
*Nset, nset=Set_5, instance=Part-1-1
  245, 441
*Nset, nset=Set_6, instance=Part-1-1
  294, 392
*Nset, nset=Set_7, instance=Part-1-1
  343
*End Assembly
**
** MATERIALS
**
*Material, name=Material-1
*Elastic
3e+07, 0.3
*STEP
*STATIC
1.,1.,1e-05,1.
*BOUNDARY
Set_boundary, ENCASTRE
*CLOAD
Set_1, 2, 0.0
Set_2, 2, -38.194
Set_3, 2, -69.44
Set_4, 2, -93.75
Set_5, 2, -111.11
Set_6, 2, -121.52
Set_7, 2, -125.0
*OUTPUT,FIELD
*ELEMENT OUTPUT
S,COORD,
E,
LOADS,
*ENERGY FILE
*OUTPUT,HISTORY,FREQUENCY=1
*ENERGY OUTPUT,VARIABLE=PRESELECT
*NODE FILE
U,COORD
*OUTPUT,FIELD
*NODE OUTPUT
U,COORD
*NODE PRINT
U,COORD
*EL PRINT
SDV
*END STEP
