*HEADING
Plane Stress Linear Static analysis of Beam under Parabolic Loading
*PREPRINT, ECHO=YES, HISTORY=NO, MODEL=NO
*NODE
  1,0.0,-6.0
  2,1.0,-6.0
  3,2.0,-6.0
  4,3.0,-6.0
  5,4.0,-6.0
  6,5.0,-6.0
  7,6.0,-6.0
  8,7.0,-6.0
  9,8.0,-6.0
  10,9.0,-6.0
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*USER ELEMENT, NODES=4, TYPE=U1, COORDINATES=2, PROPERTIES=2, VARIABLES=8
  1, 2
*ELEMENT, TYPE=U1, ELSET=EALL
  1,1,2,51,50
  2,2,3,52,51
  3,3,4,53,52
  4,4,5,54,53
  5,5,6,55,54
  6,6,7,56,55
  7,7,8,57,56
  8,8,9,58,57
  9,9,10,59,58
  10,10,11,60,59
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*UEL PROPERTY, ELSET=EALL
  3e+07, 0.3
*Nset, nset=Set_boundary, generate
  1, 589, 49
*Nset, nset=Set_1
  49, 637
*Nset, nset=Set_2
  98, 588
*Nset, nset=Set_3
  147, 539
*Nset, nset=Set_4
  196, 490
*Nset, nset=Set_5
  245, 441
*Nset, nset=Set_6
  294, 392
*Nset, nset=Set_7
  343
*BOUNDARY
Set_boundary, ENCASTRE
*STEP
*STATIC
1.,1.,1e-05,1.
*CLOAD
Set_1, 2, 0.0
Set_2, 2, -38.194
Set_3, 2, -69.44
Set_4, 2, -93.75
Set_5, 2, -111.11
Set_6, 2, -121.52
Set_7, 2, -125.0
*OUTPUT,FIELD
*ENERGY FILE
*OUTPUT,HISTORY,FREQUENCY=1
*ENERGY OUTPUT,VARIABLE=PRESELECT
*NODE FILE
U,COORD
*OUTPUT,FIELD
*NODE OUTPUT
U,COORD
*NODE PRINT
U,COORD
*EL PRINT
SDV
*END STEP
