20*HEADING
Plane Stress Linear Static analysis of Beam under Parabolic Loading
*PREPRINT, ECHO=YES, HISTORY=NO, MODEL=NO
*NODE
1,          24.,          -6.
2,           0.,          -6.
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*USER ELEMENT, NODES=4, TYPE=U1, COORDINATES=2, PROPERTIES=2, VARIABLES=8
  1, 2
*ELEMENT, TYPE=U1, ELSET=EALL
1, 228, 225,  74,  94
2, 119,  56,  55, 118
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*UEL PROPERTY, ELSET=EALL
  3e+07, 0.3
*Nset, nset=Set_boundary
  2,7,8,62,63,64,65,66,
  67,68,69,70
*Nset, nset=Set_1
  3,5
*Nset, nset=Set_2
  30, 39
*Nset, nset=Set_3
  31, 38
*Nset, nset=Set_4
  32, 37
*Nset, nset=Set_5
  33, 36
*Nset, nset=Set_6
  34, 35
*Nset, nset=Set_7
  4
*BOUNDARY
Set_boundary, ENCASTRE
*STEP
*STATIC
1.,1.,1e-05,1.
*CLOAD
Set_1, 2, 0.0
Set_2, 2, -38.194
Set_3, 2, -69.44
Set_4, 2, -93.75
Set_5, 2, -111.11
Set_6, 2, -121.52
Set_7, 2, -125.0
*OUTPUT,FIELD
*ENERGY FILE
*OUTPUT,HISTORY,FREQUENCY=1
*ENERGY OUTPUT,VARIABLE=PRESELECT
*NODE FILE
U,COORD
*OUTPUT,FIELD
*NODE OUTPUT
U,COORD
*NODE PRINT
U,COORD
*EL PRINT
SDV
*END STEP
