*HEADING
Piezoelectric strip under Bending
*PREPRINT, ECHO=YES, HISTORY=NO, MODEL=NO
*NODE
1,0.0,-0.5
2,0.125,-0.5
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*USER ELEMENT, TYPE=U1, NODES=4, PROPERTIES=9,COORDINATES=2, VARIABLES=10
1, 2, 9
*ELEMENT, TYPE=U1, ELSET=EALL
1,1,2,11,10
2,2,3,12,11
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*UEL PROPERTY, ELSET=EALL
73382.57, 28182.03, 64014.58, 21052.63, -0.02316, -0.0278, 0.012, 1.53105e-8,
1.505e-8
*Nset, nset=Set_boundary
37
*Nset, nset=left_nodes
1, 10, 19, 28, 46, 55, 64, 73
*Nset, nset=Top_nodes
73, 74, 75, 76, 77, 78, 79, 80,
81
*Nset, nset=Bottom_nodes
1, 2, 3, 4, 5, 6, 7, 8,
9
*Nset, nset=Right_nodes
9, 18, 27, 36, 45, 54, 63, 72,
81
*STEP
*STATIC
1.,1.,1e-05,1.
*BOUNDARY
Set_boundary, 1, 1
Set_boundary, 2, 2
left_nodes, 1, 1
Top_nodes, 9, 9, 1000.
Bottom_nodes, 9, 9, -1000.
9, 1, 1,0.00011765714285714285
18, 1, 1,0.00015374285714285713
27, 1, 1,0.0001898285714285714
36, 1, 1,0.0002259142857142857
45, 1, 1,0.00026199999999999997
54, 1, 1,0.00029808571428571425
63, 1, 1,0.00033417142857142853
72, 1, 1,0.0003702571428571428
81, 1, 1,0.0004063428571428571
*OUTPUT,FIELD
*ENERGY FILE
*OUTPUT,HISTORY,FREQUENCY=1
*ENERGY OUTPUT,VARIABLE=PRESELECT
*NODE FILE
U,COORD
*OUTPUT,FIELD
*NODE OUTPUT
U,COORD, EPOT
*NODE PRINT
U,COORD,EPOT
*EL PRINT
SDV
*END STEP
