*HEADING
Piezoelectric strip under Shear
*PREPRINT, ECHO=YES, HISTORY=NO, MODEL=NO
*NODE
1,           0.,          0.5
2,           0.,           0.
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*USER ELEMENT, TYPE=U1, NODES=4, PROPERTIES=9,COORDINATES=2, VARIABLES=10
1, 2, 9
*ELEMENT, TYPE=U1, ELSET=EALL
1, 32, 50, 52, 31
2, 51, 30, 31, 52
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*UEL PROPERTY, ELSET=EALL
73382.57, 28182.03, 64014.58, 21052.63, -0.02316, -0.0278, 0.012, 1.53105e-8,
1.505e-8
*Nset, nset=Set_boundary
 2
*Nset, nset=left_nodes
 1, 2, 3, 9, 10, 11, 12, 13,
 14
*Nset, nset=Top_nodes
 1, 7, 8, 27, 28, 29, 30, 31,
 32
*Nset, nset=Bottom_nodes
 3, 4, 5, 15, 16, 17, 18, 19,
 20
*Nset, nset=Right_nodes
 5, 6, 7, 21,22, 23, 24, 25,
 26
*STEP
*STATIC
1.,1.,1e-05,1.
*BOUNDARY
Set_boundary, 1, 1
Set_boundary, 2, 2
left_nodes, 1, 1
Top_nodes, 9, 9, 1000.
Bottom_nodes, 9, 9, -1000.
** RIght Nodes -- BOUNDARY
5, 1, 1,0.00011765714285714285
21, 1, 1,0.00015374285714285713
22, 1, 1,0.0001898285714285714
23, 1, 1,0.0002259142857142857
6, 1, 1,0.00026199999999999997
24, 1, 1,0.00029808571428571425
25, 1, 1,0.00033417142857142853
26, 1, 1,0.0003702571428571428
7, 1, 1,0.0004063428571428571
*OUTPUT,FIELD
*ENERGY FILE
*OUTPUT,HISTORY,FREQUENCY=1
*ENERGY OUTPUT,VARIABLE=PRESELECT
*NODE FILE
U,COORD
*OUTPUT,FIELD
*NODE OUTPUT
U,COORD, EPOT
*NODE PRINT
U,EPOT
*EL PRINT
SDV
*FILE FORMAT, ZERO INCREMENT
*EL FILE, FREQUENCY=1
SDV
*NODE FILE, FREQUENCY=1
U, EPOT
*END STEP
