*HEADING
PIEZOELECTRIC PATCH TESTING :::
*PREPRINT,ECHO=YES,HISTORY=NO,MODEL=NO
*NODE
10, 0.2, 0.
20, 0.44, 0.
30, 0.44, 0.12
40, 0.2, 0.12
50, 0.24, 0.02
60, 0.38, 0.03
70, 0.36, 0.08
80, 0.28, 0.08
*USER ELEMENT, NODES=4, TYPE=U1, COORDINATES=2, PROPERTIES=9, VARIABLES=10
1, 2, 9
*ELEMENT, TYPE=U1, ELSET=EALL
1, 10, 20, 60, 50
2, 10, 50, 80, 40
3, 50, 60, 70, 80
4, 60, 20, 30, 70
5, 80, 70, 30, 40
*UEL PROPERTY, ELSET=EALL
139000, 74300, 113000, 25600, -6.98E6, 13.84E6, 13.44E6, 6E9,
5.47E9
*STEP
*STATIC
1.,1.,,1.
*BOUNDARY
10, 1, , 0.001584365037499877
10, 2, 2
10, 9, 9
20, 2, 2
20, 9, 9
20, 1, , 0.003485603082499729
30, 1, , 0.003485603082499729
30, 2, , -0.00036375799066797954
30, 9, 9, -2.1334061001634954e-06
40, 1, , 0.001584365037499877
40, 2, , -0.00036375799066797954
40, 9, 9, -2.1334061001634954e-06
*ENERGY PRINT
COORD
*NODE FILE
 U,RF,CF,COORD
*OUTPUT,FIELD
*NODE OUTPUT
U,RF,CF,COORD
*ENERGY FILE
*OUTPUT,HISTORY,FREQUENCY=1
*ENERGY OUTPUT,VARIABLE=PRESELECT
*ENERGY PRINT
*NODE PRINT
 U, RF
*EL PRINT
 SDV
*EL PRINT
 S,
 E,
*EL PRINT,POSITION=NODES
 S,
 E,
*EL PRINT,POSITION=AVERAGED AT NODES
 S,
 E,
*EL PRINT,POSITION=CENTROID
 S,
 E,
*EL FILE
 S,
 E,
*OUTPUT,FIELD
*ELEMENT OUTPUT
S,
E,
*EL FILE,POSITION=NODES
 S,
 E,
*EL FILE,POSITION=AVERAGED AT NODES
 S,
 E,
*EL FILE,POSITION=CENTROID
 S,
 E,
*END STEP
