*Heading
** Job name: Job-1 Model name: Model-1
** Generated by: Abaqus/CAE 2018
*Preprint, echo=NO, model=NO, history=NO, contact=NO
**
** PARTS
**
*Part, name=Part-1
*End Part
**
**
** ASSEMBLY
**
*Assembly, name=Assembly
**
*Instance, name=Part-1-1, part=Part-1
*Node
10, 0.2, 0.
20, 0.44, 0.
30, 0.44, 0.12
40, 0.2, 0.12
50, 0.24, 0.02
60, 0.38, 0.03
70, 0.36, 0.08
80, 0.28, 0.08
*Element, type=CPS4E, elset=Set-1
1, 10, 20, 60, 50
2, 10, 50, 80, 40
3, 50, 60, 70, 80
4, 60, 20, 30, 70
5, 80, 70, 30, 40
*Nset, nset=Set-1, generate
   10,  80,    10
*Elset, elset=Set-1, generate
   1,  5,    1
*Orientation, name=Ori-2
   1., 0., 0., 0., 1., 0.
   3, 0.
** Section: Section-1
*Solid Section, elset=Set-1,orientation=Ori-2, material=Material-1
,
*End Instance
**
*Nset, nset=Set-3, instance=Part-1-1
  10
*Nset, nset=Set-4, instance=Part-1-1
  20
*Nset, nset=Set-5, instance=Part-1-1
  30
*Nset, nset=Set-6, instance=Part-1-1
  40
*End Assembly
**
** MATERIALS
**
*Material, name=Material-1
*Dielectric, type=ORTHO
 6e+09, 0, 5.47e+09
 *Elastic, type=LAMINA
 90146., 73284.2,0.65, 25600.,0.,0.,
*Piezoelectric
0.,        0.,        0.,        0., 1.344e+07,        0.,        0.,        0.
        0.,        0.,        0.,        0., -6.98e+06,        0., 1.384e+07,        0.
        0.,        0.
** ----------------------------------------------------------------
**
** STEP: Step-1
**
*Step, name=Step-1, nlgeom=NO
*Static
1., 1., 1e-05, 1.
**
** BOUNDARY CONDITIONS
**
*BOUNDARY
Set-3, 1, 1, 0.001584365037499877
Set-3, 2, 2
Set-3, 9, 9
Set-4, 2, 2
Set-4, 9, 9
Set-4, 1, 1, 0.003485603082499729
Set-5, 1, 1, 0.003485603082499729
Set-5, 2, 2, -0.00036375799066797954
Set-5, 9, 9, -2.1334061001634954e-06
Set-6, 1, 1, 0.001584365037499877
Set-6, 2, 2, -0.00036375799066797954
Set-6, 9, 9, -2.1334061001634954e-06
*ENERGY PRINT
COORD
*NODE FILE
 U,RF,CF,COORD
*OUTPUT,FIELD
*NODE OUTPUT
U,RF,CF,COORD
*ENERGY FILE
*OUTPUT,HISTORY,FREQUENCY=1
*ENERGY OUTPUT,VARIABLE=PRESELECT
*ENERGY PRINT
*NODE PRINT
 U, RF
*EL PRINT
 SDV
*EL PRINT
 S,
 E,
*EL PRINT,POSITION=NODES
 S,
 E,
*EL PRINT,POSITION=AVERAGED AT NODES
 S,
 E,
*EL PRINT,POSITION=CENTROID
 S,
 E,
*EL FILE
 S,
 E,
*OUTPUT,FIELD
*ELEMENT OUTPUT
S,
E,
*EL FILE,POSITION=NODES
 S,
 E,
*EL FILE,POSITION=AVERAGED AT NODES
 S,
 E,
*EL FILE,POSITION=CENTROID
 S,
 E,
*END STEP
