*HEADING
Piezoelectric strip under Shear
*PREPRINT, ECHO=YES, HISTORY=NO, MODEL=NO
*NODE
1,           0.,          0.5
2,           0.,           0.
3,           0.,         -0.5
4,          0.5,         -0.5
5,           1.,         -0.5
6,           1.,           0.
7,           1.,          0.5
8,          0.5,          0.5
9,           0.,        0.375
10,           0.,         0.25
11,           0.,        0.125
12,           0.,       -0.125
13,           0.,        -0.25
14,           0.,       -0.375
15,        0.125,         -0.5
16,         0.25,         -0.5
17,        0.375,         -0.5
18,        0.625,         -0.5
19,         0.75,         -0.5
20,        0.875,         -0.5
21,           1.,       -0.375
22,           1.,        -0.25
23,           1.,       -0.125
24,           1.,        0.125
25,           1.,         0.25
26,           1.,        0.375
27,        0.875,          0.5
28,         0.75,          0.5
29,        0.625,          0.5
30,        0.375,          0.5
31,         0.25,          0.5
32,        0.125,          0.5
33,  0.878388226,  0.129912093
34,  0.117300101, 0.00587890809
35,  0.629376411, -0.374065876
36,  0.120757475,   0.25389877
37,  0.117940933,  0.130837634
38,   0.11921189,  -0.12084157
39,  0.123553231, -0.246451467
40,  0.379202127, -0.364757389
41,  0.504716635, -0.370468885
42,   0.75214082,  -0.37517491
43,  0.875627398, -0.375200421
44,  0.876006126, -0.122851714
45,  0.876584172, 0.00394378742
46,  0.878755927,  0.254080802
47,  0.877376914,  0.377204478
48,  0.628584921,  0.376027346
49,  0.501138866,  0.370833993
50,  0.122858092,  0.376710206
51,  0.373006403,  0.373837918
52,   0.24704136,  0.376551747
53,  0.636615396, -0.250671118
54,  0.241358429,  0.255290091
55,  0.233267158,  0.135113746
56,  0.233025223, -0.112671174
57,  0.759427488,  0.135677114
58,  0.227797255, 0.0133523466
59,  0.385239542, -0.217439085
60,  0.517322302, -0.245547712
61,  0.755636513, -0.122818016
62,  0.754560351, 0.0071211555
63,  0.637736082,   0.25682503
64,  0.502985835,   0.23353821
65,   0.24854134, -0.238147184
66,  0.755113721, -0.250548273
67,  0.758128703,  0.257308602
68,  0.365316242,  0.251337767
69,  0.344296515,  0.133304551
70,  0.400252402, -0.0688272715
71,  0.563237965,   0.14693369
72,  0.542718232, -0.133364111
73,  0.630954862, 0.00866835006
74,  0.327762574,  0.018807454
75,  0.753835738,  0.378025502
76,   0.25226596, -0.368074059
77,  0.876335323, -0.250046402
78,   0.64472729, -0.128680363
79,  0.332028389, -0.0954498127
80,  0.650338471,  0.141609758
81,  0.443832368,  0.113242209
82,  0.529515088, 0.0674245581
83,  0.552443802, -0.0448739789
84,  0.456188381, -0.110113725
85,  0.125724882, -0.372244209
86,  0.413918167, 0.0130851427
87,  0.489783674, -0.0153178461
*USER ELEMENT, TYPE=U1, NODES=4, PROPERTIES=9,COORDINATES=2, VARIABLES=10
1, 2, 9
*ELEMENT, TYPE=U1, ELSET=EALL
1, 32, 50, 52, 31
2, 51, 30, 31, 52
3, 24, 25, 46, 33
4, 38, 12, 13, 39
5, 18, 19, 42, 35
6, 42, 43, 77, 66
7, 36, 10, 11, 37
8, 69, 68, 54, 55
9,  2, 34, 37, 11
10, 12, 38, 34,  2
11, 14, 85, 39, 13
12,  3, 15, 85, 14
13, 59, 65, 76, 40
14, 35, 41,  4, 18
15, 21, 43, 20,  5
16, 43, 42, 19, 20
17, 44, 61, 66, 77
18, 33, 45,  6, 24
19, 27, 47, 26,  7
20, 47, 46, 25, 26
21, 48, 63, 67, 75
22, 51, 49,  8, 30
23, 10, 36, 50,  9
24, 51, 52, 54, 68
25, 32,  1,  9, 50
26, 37, 34, 58, 55
27, 38, 39, 65, 56
28, 53, 35, 42, 66
29, 36, 54, 52, 50
30, 67, 46, 47, 75
31, 55, 54, 36, 37
32, 15, 16, 76, 85
33, 16, 17, 40, 76
34, 41, 40, 17,  4
35, 59, 40, 41, 60
36, 35, 53, 60, 41
37, 21, 22, 77, 43
38, 22, 23, 44, 77
39, 45, 44, 23,  6
40, 61, 44, 45, 62
41, 33, 57, 62, 45
42, 27, 28, 75, 47
43, 28, 29, 48, 75
44, 49, 48, 29,  8
45, 63, 48, 49, 64
46, 78, 61, 62, 73
47, 58, 56, 79, 74
48, 68, 64, 49, 51
49, 74, 79, 70, 86
50, 82, 87, 83, 73
51, 34, 38, 56, 58
52, 65, 59, 79, 56
53, 57, 33, 46, 67
54, 67, 63, 80, 57
55, 84, 59, 60, 72
56, 66, 61, 78, 53
57, 73, 80, 71, 82
58, 86, 81, 69, 74
59, 76, 65, 39, 85
60, 55, 58, 74, 69
61, 68, 69, 81, 64
62, 62, 57, 80, 73
63, 79, 59, 84, 70
64, 63, 64, 71, 80
65, 72, 60, 53, 78
66, 84, 87, 86, 70
67, 83, 72, 78, 73
68, 71, 64, 81, 82
69, 83, 87, 84, 72
70, 87, 82, 81, 86
*UEL PROPERTY, ELSET=EALL
73382.57, 28182.03, 64014.58, 21052.63, -0.02316, -0.0278, 0.012, 1.53105e-8,
1.505e-8
*Nset, nset=Set_boundary
 2
*Nset, nset=left_nodes
 1, 2, 3, 9, 10, 11, 12, 13,
 14
*Nset, nset=Top_nodes
 1, 7, 8, 27, 28, 29, 30, 31,
 32
*Nset, nset=Bottom_nodes
 3, 4, 5, 15, 16, 17, 18, 19,
 20
*Nset, nset=Right_nodes
 5, 6, 7, 21,22, 23, 24, 25,
 26
*STEP
*STATIC
1.,1.,1e-05,1.
*BOUNDARY
Set_boundary, 1, 1
Set_boundary, 2, 2
Set_boundary, 9, 9, 1000.
left_nodes, 1, 1
left_nodes, 9, 9, 1000.
Right_nodes, 9, 9, -1000.
** Top Nodes -- BOUNDARY
1, 1, 1, 0.0
1, 2, 2, -4.70000000e-05
7, 1, 1, 3.61000000e-05
7, 2, 2, 1.12100000e-03
8, 1, 1, 1.80500000e-05
8, 2, 2, 5.37000000e-04
27, 1, 1, 3.15875e-05
27, 2, 2, 9.750e-04
28, 1, 1, 2.70750e-05
28, 2, 2, 8.290e-04
29, 1, 1, 2.25625e-05
29, 2, 2, 6.830e-04
30, 1, 1, 1.35375e-05
30, 2, 2, 3.910e-04
31, 1, 1, 9.02500e-06
31, 2, 2, 2.450e-04
32, 1, 1, 4.51250e-06
32, 2, 2, 9.900e-05
** Bottom Nodes -- BOUNDARY
3, 1, 1, 0.0
3, 2, 2, 4.700e-05
4, 1, 1, 1.80500e-05
4, 2, 2, 6.310e-04
5, 1, 1, 3.61000e-05
5, 2, 2, 1.215e-03
15, 1, 1, 4.51250e-06
15, 2, 2, 1.930e-04
16, 1, 1, 9.02500e-06
16, 2, 2, 3.390e-04
17, 1, 1, 1.35375e-05
17, 2, 2, 4.850e-04
18, 1, 1, 2.25625e-05
18, 2, 2, 7.770e-04
19, 1, 1, 2.70750e-05
19, 2, 2, 9.230e-04
20, 1, 1, 3.15875e-05
20, 2, 2, 1.069e-03
*OUTPUT,FIELD
*ENERGY FILE
*OUTPUT,HISTORY,FREQUENCY=1
*ENERGY OUTPUT,VARIABLE=PRESELECT
*NODE FILE
U,COORD
*OUTPUT,FIELD
*NODE OUTPUT
U,COORD, EPOT
*NODE PRINT
U,EPOT
*EL PRINT
SDV
*FILE FORMAT, ZERO INCREMENT
*EL FILE, FREQUENCY=1
SDV
*NODE FILE, FREQUENCY=1
U, EPOT
*END STEP
